# Задание 1
Xa := -2
Ya := -4
Xb := -3
Yb := 0
Xc := 0
Yc := 4
Xd := 3
Yd := 0
Xe := 2
Ye := -4
Xf := -2
Yf := 0
Xh := 2
Yh := 0
Xlw := 100
Ylw := 200
Xhw := 400
Yhw := 500
Zx := transpose([Xa, Xb, Xc, Xd, Xe, Xf, Xh])
Zy := transpose([Ya, Yb, Yc, Yd, Ye, Yf, Yh])
xL := min(Zx)
yH := max(Zy)
xL = -3
yH = 4
xH := max(Zx)
yL := min(Zy)
xH = 3
yL = -4
# Левый угол ^ | Правый угол ^
# Вычисляем параметры необходимые для формирования матрицы пересчета координат из МСК в ОСК
Δxw := Xhw - Xlw = 300  # Ширина области отображения в ОСК
Δx := xH - xL = 6  # Ширина области отображения в МСК
Δyw := Yhw - Ylw = 300  # Высота области отображения в ОСК
Δy := yH - yL = 8  # Высота области отображения в МСК
Kx := Δxw/Δx
Kx = 50
Ky := Δyw/Δy
Ky = 37.5
Tsw := [Kx, 0, Xlw - Kx*xL; 0, -Ky, Yhw + Ky*yL; 0, 0, 1]  # Матрица пересчета из МСК в ОСК
# Вычисляем координаты вершин в ОСК
[Xaw; Yaw; q] := Tsw*[Xa; Ya; 1]
[Xaw; Yaw; q] = [150; 500; 1]  # Вершина А
[Xbw; Ybw; q] := Tsw*[Xb; Yb; 1]
[Xbw; Ybw; q] = [100; 350; 1]  # Вершина В
[Xcw; Ycw; q] := Tsw*[Xc; Yc; 1]
[Xcw; Ycw; q] = [250; 200; 1]  # Вершина С
[Xdw; Ydw; q] := Tsw*[Xd; Yd; 1]
[Xdw; Ydw; q] = [400; 350; 1]  # Вершина D
[Xew; Yew; q] := Tsw*[Xe; Ye; 1]
[Xew; Yew; q] = [350; 500; 1]  # Вершина Е
[Xfw; Yfw; q] := Tsw*[Xf; Yf; 1]
[Xfw; Yfw; q] = [150; 350; 1]  # Вершина F
[Xgw; Ygw; q] := Tsw*[Xh; Yh; 1]
[Xgw; Ygw; q] = [350; 350; 1]  # Вершина H
X := transpose([Xb, Xc, Xd, Xb, Xf, Xa, Xe, Xh, Xd])
Y := transpose([Yb, Yc, Yd, Yb, Yf, Ya, Ye, Yh, Yd])
X = [-3; 0; 3; -3; -2; -2; 2; 2; 3]
Y = [0; 4; 0; 0; 0; -4; -4; 0; 0]
Xw := transpose([Xbw, Xcw, Xdw, Xbw, Xfw, Xaw, Xew, Xgw, Xdw])
Yw := transpose([Ybw, Ycw, Ydw, Ybw, Yfw, Yaw, Yew, Ygw, Ydw])
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# 2 способ
Mabc := [Xa, Xb, Xc, Xd, Xe, Xf, Xh; Ya, Yb, Yc, Yd, Ye, Yf, Yh; 1, 1, 1, 1, 1, 1, 1]
Mw := Tsw*Mabc
Mw = [150, 100, 250, 400, 350, 150, 350; 500, 350, 200, 350, 500, 350, 350; 1, 1, 1, 1, 1, 1, 1]
Vaw := Mw[:, 0]
Vdw := Mw[:, 3]
Vbw := Mw[:, 1]
Vew := Mw[:, 4]
Vcw := Mw[:, 2]
Vfw := Mw[:, 5]
Vhw := Mw[:, 6]
Xw2 := transpose([Vbw[0], Vcw[0], Vdw[0], Vbw[0], Vfw[0], Vaw[0], Vew[0], Vhw[0], Vdw[0]])
Yw2 := transpose([Vbw[1], Vcw[1], Vdw[1], Vbw[1], Vfw[1], Vaw[1], Vew[1], Vhw[1], Vdw[1]])
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