# Задание 2
f(x) := sin(π*x)*sqrt(|x|)
x1 := -6
x2 := 6
Δx := 0.1
# Задаем область отображения графика в окне Windows
Xlw := 100
Ylw := 800  # Левый верхний угол области отображения
Xhw := 200
Yhw := 900  # Правый нижний угол области отображения
# Вычисляем число точек графика
N := round((x2 - x1)/Δx)
N = 120
# Заполняем массивы X,Y,Z значениями Xi, Yi = f(Xi) и 1 соответственно в МСК
i := 0 .. N
X[i] := x1 + i*Δx
Y[i] := f(X[i])
Z[i] := 1  # Координаты точек гравика Х и У в МСК
# Определяем область графика в мировой системе координат
xL := min(X)
yH := max(Y)  # левый верхний угол в МСК
xL = -6
yH = 2.34521
xH := max(X)
yL := min(Y)
# правый нижний угол в МСК
xH = 6
yL = -2.34521
# Формируем матрицу координат точек графика в МСК
Ms := stack(transpose(X), transpose(Y), transpose(Z))
# Вычисляем параметры необходимые для формирования матрицы
# пересчета координат из МСК в ОСК
ΔxW := Xhw - Xlw
ΔxW = 100
Δx := xH - xL
Δx = 12
ΔyW := Yhw - Ylw
ΔyW = 100
Δy := yH - yL
Δy = 4.69042
Kx := ΔxW/Δx
Kx = 8.33333
Ky := ΔyW/Δy
Ky = 21.3201
# Формируем матрицу пересчета из МСК в ОСК
Tsw := [Kx, 0, Xlw - Kx*xL; 0, -Ky, Yhw + Ky*yL; 0, 0, 1]
# Вычисляем матрицу координат точек графика в оконной системе
# координат
Mw := Tsw*Ms  # Координаты точек графика ОСК
# Из матрицы Mw выбираем (х,у) координаты точек графика для отображения
Xw := transpose(Mw)[:, 0]
Yw := transpose(Mw)[:, 1]
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