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# Задание 1
x := 2
n := floor(rnd(10) + 1)
n = 1
y := (sqrt(x^3 + n) + cos(|n*x - 1|)^2)/(nthroot(x^5 + sin(x) + n, 4)*cos(π/4*(x + n)))
y = -1.92924
# Задание 2
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x := 7
x := 7
y := 10
y := 10
z := -3
z := -3
p := if(x > y, x > y*sin(x) + 3*|y| - z^2, (y + 3)/sqrt(z^2 + 1)*ln(|x + 1|))
p := if(x > y, x > y*sin(x) + 3*|y| - z^2, (y + 3)/sqrt(z^2 + 1)*ln(|x + 1|))
p = 8.5485
p = 8.5485
q := if((x > y) and (x < 1), cos(x) + 2*|y + 1| - z, (x*y + 3)/sqrt(y^2 + 5))
q := if((x > y) and (x < 1), cos(x) + 2*|y + 1| - z, (x*y + 3)/sqrt(y^2 + 5))
q = 7.12407
q = 7.12407
w := if((x < y) or (y ≥ 10), x^2 + 2*(y*x + 1) - z, (x^-3*y^2 + 3)*sqrt(z^2 + 7))
w := if((x < y) or (y ≥ 10), x^2 + 2*(y*x + 1) - z, (x^-3*y^2 + 3)*sqrt(z^2 + 7))
w = 194
w = 194
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# Задание 3
x1 := -2
x2 := 2
Δx := 0.4
n := floor(rnd(10) + 1)
n = 2
x := x1, x1 + Δx .. x2
x = [-2; -1.6; -1.2; -0.8; -0.4; 0; 0.4; 0.8; 1.2; 1.6; 2]
f(x) := (x^2 - n*x + sin(x))*sqrt(|x - cos(n*x)|)
f(x) = [8.22753; 3.69265; 1.97785; 1.33681; 0.597535; 0; -0.136494; -0.220952; -0.0389189; 0.579605; 1.48125]
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# Задание 4
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n := floor(rnd(10) + 1)
n = 6
a := -3*n
b := 3*n
A := runif(3, a, b)
B := runif(3, a, b)
C := runif(3, a, b)
A = [-5.38891; 11.6222; -11.7314]
B = [7.57783; -7.0565; -14.7092]
C = [-12.6967; 17.5863; -13.7131]
s := A*B = 49.7108
s := A[0]*B[0] + A[1]*B[1] + A[2]*B[2] = 49.7108
V := B×C = [355.447; 290.674; 43.6717]
V := [B[1]*C[2] - B[2]*C[1]; B[2]*C[0] - B[0]*C[2]; B[0]*C[1] - B[1]*C[0]] = [355.447; 290.674; 43.6717]
w := (A×B)*C = 950.463
w := (A[1]*B[2] - A[2]*B[1])*C[0] + (A[2]*B[0] - A[0]*B[2])*C[1] + (A[0]*B[1] - A[1]*B[0])*C[2] = 950.463
p := if((|A| > |B|) and (|A| > |C|), "Это А", if(|B| > |A| and |B| > |C|, "Это Б", if(|C| > |B| and |C| > |A|, "Это С", "NULL")))
p = "Это С"
n := 10
m := 10
i := 0 .. n - 1
j := 0 .. m - 1
M[i, j] := floor(-10 + rnd(20))
M = [
    -10, 0, 2, -7, -1, -9, 5, 0, 7, 9;
    0, -1, 7, 5, 9, 2, -5, 6, -3, 3;
    -10, -5, 1, 6, -1, 4, -1, 4, 1, 4;
    1, -7, -2, 0, 5, -7, -1, 3, -8, -8;
    3, -2, 9, -7, 6, -7, 6, -7, 4, -5;
    3, 4, -8, 6, 0, -2, 8, 0, -1, 6;
    -1, 9, 4, -7, 6, 0, -10, 1, 0, 6;
    3, 6, -8, -4, -5, -8, 6, 2, -5, -10;
    6, -6, 1, -8, 5, 0, -2, 3, -2, 1;
    2, 0, 3, -7, -7, -1, -9, -9, 8, 7
]
Mv[i] := sum(M[:, i])
sum(sum(M[i, j], j = 0 .. 9), i = 0 .. 9) = -16
sM := sum(Mv)
sM = -16
sumPos(A) :=
    s ← 0
    for i ∈ 0 .. 9
        for j ∈ 0 .. 9
            s ← s + A[i, j] if (A[i, j] > 0)
    return s
Mp[i, j] := M[i, j]*(M[i, j] > 0)
Mpv[i] := sum(Mp[:, i])
sMp := sum(Mpv)
sumPos(M) = 218
sMp = 218
sumNeg(A) :=
    s ← 0
    for i ∈ 0 .. 9
        for j ∈ 0 .. 9
            s ← s + A[i, j] if (A[i, j] < 0)
    return s
Mn[i, j] := M[i, j]*(M[i, j] < 0)
Mnv[i] := sum(Mn[:, i])
sMn := sum(Mnv)
sumNeg(M) = -234
sMn = -234
X := submatrix(M, 0, 9, 0, 0)
Y := submatrix(M, 9, 9, 0, 9)
Y = [2, 0, 3, -7, -7, -1, -9, -9, 8, 7]
X = [-10; 0; -10; 1; 3; 3; -1; 3; 6; 2]
q := X*transpose(Y)
q = -37
# Задание 5
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x := -3*π .. 3*π
y(x) := e^(-(|x|/3))*cos(x)
y(x) = [-0.0432139; -0.0325856; 0.0350268; 0.116292; 0.107158; -0.0649007; -0.306592; -0.335964; 0.090491; 0.790838; 0.692671; -0.00261785; -0.357656; -0.275584; -0.0297547; 0.118451; 0.106992; 0.0220275; -0.0378758]
x = [-9.42478; -8.42478; -7.42478; -6.42478; -5.42478; -4.42478; -3.42478; -2.42478; -1.42478; -0.424778; 0.575222; 1.57522; 2.57522; 3.57522; 4.57522; 5.57522; 6.57522; 7.57522; 8.57522]
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# Задание 6
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x1 := -9
x2 := 9
Δx := 0.25
x := x1, x1 + Δx .. x2
f(x) := if(x < 0, e^x*x^3, e^(-x)*x^3)
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# Задание 7
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x1 := -2*π
x2 := 2*π
Δx := π/4
x := x1, x1 + Δx .. x2
g(x) := sqrt(|x|)*sin(x)
X := x = [-6.28319; -5.49779; -4.71239; -3.92699; -3.14159; -2.35619; -1.5708; -0.785398; 0; 0.785398; 1.5708; 2.35619; 3.14159; 3.92699; 4.71239; 5.49779; 6.28319]
Y := g(X) = [0; 2.8164; 3.983; 2.8164; 0; -2.8164; -3.983; -2.8164; 0; 2.8164; 3.983; 2.8164; 0; -2.8164; -3.983; -2.8164; 0]
WRITEPRN("X.txt") := X
WRITEPRN("Y.txt") := Y
YY := READPRN("Y.txt")
XX := READPRN("X.txt")
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XX = [-6.283; -5.498; -4.712; -3.927; -3.142; -2.356; -1.571; -0.7854; 0; 0.7854; 1.571; 2.356; 3.142; 3.927; 4.712; 5.498; 6.283]
YY = [0; 2.816; 3.983; 2.816; 0; -2.816; -3.983; -2.816; 0; 2.816; 3.983; 2.816; 0; -2.816; -3.983; -2.816; 0]
# Задание 8
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x := -3, -2.9 .. 3
q(x) := e^(-x^2)
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# Задание 9
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x1 := -15
y1 := -15
Nxy := 42
x2 := 15
y2 := 15
f(x, y) := sin(sqrt(x^2 + y^2))/sqrt(x^2 + y^2)
Δx := (x2 - x1)/Nxy
Δy := (y2 - y1)/Nxy
Δx = 0.714286
Δy = 0.714286
i := 0 .. Nxy
j := 0 .. Nxy
x[i] := x1 + i*Δx
y[j] := y1 + j*Δy
M[i, j] := f(x[i], y[j])
# [component: inputs M]
# Задание 10
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f(x) := x^2 + (x - 2)*sin(x) - 5
x := -5, -4.9 .. 5
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x := -1
x1 := root(f(x), x) = -1.32936
x := 2
x2 := root(f(x), x) = 2.19967
f(x1) = 9.76996e-15
f(x2) = 3.52607e-13
y1 := x1^2 + (x1 - 2)*sin(x1) - 5 = 9.76996e-15
y2 := x2^2 + (x2 - 2)*sin(x2) - 5 = 3.52607e-13
# Задание 11
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f(x) := x^2 + x*sin(2*x) - (x - 5)*cos(x)
x := -4, -3.9 .. 4
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x1 := root(f(x), x, -3, -2) = -2.97354
x2 := root(f(x), x, -2, -1) = -1.93283
f(x1) = -1.77636e-15
f(x2) = 0
y1 := x1^2 + x1*sin(2*x1) - (x1 - 5)*cos(x1) = -1.77636e-15
y2 := x2^2 + x2*sin(2*x2) - (x2 - 5)*cos(x2) = 0
# Задание 12
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f(x) := x^3 + (4 - n)*x^2 + (3 - 4*n)*x - 3*n
n := floor(rnd(10) + 1)
n = 3
V := transpose([-3*n, 3 - 4*n, 4 - n, 1])
X := polyroots(V) = [-3; -1; 3]
transpose(X) = [-3, -1, 3]
# Задание 13
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n := floor(rnd(10) + 1)
n = 5
1.
A := [n, n + 1, n + 2; n - 3, n - 2, n; n - 1, n, n + 1]
A = [5, 6, 7; 2, 3, 5; 4, 5, 6]
B := [6*n + 8; 6*n - 7; 6*n + 2]
B = [38; 23; 32]
[x; y; z] := A^-1*B
X := [x; y; z] = [1; 2; 3]
A*X = [38; 23; 32]
X := lsolve(A, B) = [1; 2; 3]
y := 0
2.
x := 0
z := 0
Given
n*x + (n + 1)*y + (n + 2)*z == 6*n + 8
(n - 3)*x + (n - 2)*y + n*z == 6*n - 7
(n - 1)*x + n*y + (n + 1)*z == 6*n + 2
A := Find(x, y, z) = [1; 2; 3]
x := A[0]
y := A[1]
z := A[2]
n*x + (n + 1)*y + (n + 2)*z = 38
6*n + 8 = 38
(n - 3)*x + (n - 2)*y + n*z = 23
6*n - 7 = 23
(n - 1)*x + n*y + (n + 1)*z = 32
6*n + 2 = 32
# Задание 14
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x := 5
y := 2
Given
x^2/81 + y^2/16 == 1
(x - 9)^2 + (y - 2)^2 == 25
A := Find(x, y) = [4.23934; 3.52845]
y1(x) := sqrt(1 - x^2/81)*4
y3(x) := 2 + sqrt(25 - (x - 9)^2)
x := 5
y := -2
y4(x) := 2 - sqrt(25 - (x - 9)^2)
Given
y2(x) := sqrt(1 - x^2/81)*(-4)
x^2/81 + y^2/16 == 1
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(x - 9)^2 + (y - 2)^2 == 25
B := Find(x, y) = [6.9308; -2.55175]
# Задание 15
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x := 0 .. 10
f(x) := x*sin(x)
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x := 2
x1_max := Maximize(f, x) = 2.02876
y1_max := f(x1_max) = 1.81971
x := 5
x1_min := Minimize(f, x) = 4.91318
y1_min := f(x1_min) = -4.81447
x := 8
x2_max := Maximize(f, x) = 7.97867
y2_max := f(x2_max) = 7.91673
