f(x) := x^2 + (x - 2)*sin(x) - 5
x1 := -5
x2 := 5
Δx := 1
x := x1, x1 + Δx .. x2
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x = [-5; -4; -3; -2; -1; 0; 1; 2; 3; 4; 5]
root(f(x), x) = [-1.32936; -1.32936; -1.32936; -1.32936; -1.32936; -1.32936; 2.19967; 2.19967; 2.19967; 2.19967; 2.19967]
nx1 := -1.329
nx2 := 2.2
f(nx1) = -0.00160155
f(nx2) = 0.00169928
