f(x) := x^2 + x*sin(2*x) - (x - 5)*cos(x)
x := -4 .. 4
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root(f(x), x, -4, -2) = -2.97354
root(f(x), x) = [-2.97354; -2.97354; -1.93283; -2.97354; -1.93283; -1.93283; -2.97354; -1.93283; -1.93283]
root(f(x), x, -2, -1) = -1.93283
f(-2.974) = 0.00411823
f(-1.933) = -0.00110412
