x := 0 .. 10
f(x) := x*sin(x)
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x := 2
f(x) = 1.81859
Maximize(f, x, 0, 10) = [2.02876; 0; 10]
x := 5
Minimize(f, x, 0, 10) = [4.91318; 0; 10]
f(x) = -4.79462
x := 8
Maximize(f, x, 0, 10) = [7.97867; 0; 10]
f(x) = 7.91487
