n := 5
x1 := -2
x2 := 2
Δx := 0.4
x := x1, x1 + Δx .. x2
x = [-2; -1.6; -1.2; -0.8; -0.4; 0; 0.4; 0.8; 1.2; 1.6; 2]
f(x) := (x^2 - (n*x) + sin(x))*sqrt(|x - cos(n*x)|)
f(x) = [14.1048; 11.5301; 9.56509; 1.50067; 0.224988; 0; -1.31047; -3.18616; -1.7767; -5.86657; -8.5776]
