n := 2
floor(rnd(10) + 1)
a := -3*n
b := 3*n
A := runif(3, a, b)
B := runif(3, a, b)
C := runif(3, a, b)
A = [-5.35819; 4.36245; -2.32314]
B = [-5.67934; -1.3059; -5.6274]
C = [4.29526; -1.1771; 1.33916]
s := vectorize(A)*vectorize(B) = 37.8073
s := A[0]*B[0] + A[1]*B[1] + A[2]*B[2] = 37.8073
V := vectorize(B)×vectorize(C) = [-8.37283; -16.5656; 12.2944]
V := [B[1]*C[2] - B[2]*C[1]; B[2]*C[0] - B[0]*C[2]; B[0]*C[1] - B[1]*C[0]] = [-8.37283; -16.5656; 12.2944]
w := (vectorize(A)×vectorize(B))*vectorize(C) = -55.9647
w := (A[1]*B[2] - A[2]*B[1])*C[0] + (A[2]*B[0] - A[0]*B[2])*C[1] + (A[0]*B[1] - A[1]*B[0])*C[2] = -55.9647
p := if((|A| > |B|) and (|A| > |C|), "Это А", "Это не А")
p := if((|B| > |A|) and (|B| > |C|), "'Это B", p)
p := if((|C| > |B|) and (|C| > |A|), "'Это С", p)
p = "'Это B"
n := 10
m := 10
i := 0 .. n - 1
j := 0 .. m - 1
M[i, j] := floor(-10 + rnd(20))
M = [
    7, 1, 5, 1, 1, 3, -10, -4, 5, 7;
    4, 7, 0, 5, -7, 5, 6, 2, 2, -5;
    5, 4, -9, 7, -4, -1, -7, 9, 2, -7;
    -5, 6, -3, -6, -6, 9, -10, -7, -10, 2;
    -2, -9, 3, 3, 0, -9, -5, 7, -9, 4;
    7, -5, 2, 6, 7, 8, -2, -3, -2, -10;
    5, -9, 3, -7, -10, -10, 2, 8, -2, -6;
    3, -10, -8, 1, -1, -4, -4, 2, 9, -7;
    4, 5, 2, 3, 1, 0, -6, -1, 3, 2;
    5, 9, 2, 1, 0, -2, 8, -5, 4, 2
]
floor(rnd(10) + 1)
n = 10
a := -3*n
b := 3*n
A := runif(3, a, b)
B := runif(3, a, b)
C := runif(3, a, b)
Mv[i] := sum(M[:, i])
sum(sum(M[i, j], j = 0 .. 9), i = 0 .. 9) = -13
sM := sum(Mv)
A = [8.47968; 3.38112; -3.22071]
B = [29.7604; 6.05356; -19.6314]
C = [-10.0537; 9.21462; -4.35018]
sM = -13
sumPos(A) :=
    s ← 0
    for i ∈ 0 .. 9
        for j ∈ 0 .. 9
            s ← s + A[i, j] if (A[i, j] > 0)
    return s
Mp[i, j] := M[i, j]*(M[i, j] > 0)
s := vectorize(A)*vectorize(B) = 336.053
s := A[0]*B[0] + A[1]*B[1] + A[2]*B[2] = 336.053
Mpv[i] := sum(Mp[:, i])
V := vectorize(B)×vectorize(C) = [154.561; 326.832; 335.091]
V := [B[1]*C[2] - B[2]*C[1]; B[2]*C[0] - B[0]*C[2]; B[0]*C[1] - B[1]*C[0]] = [154.561; 326.832; 335.091]
sMp := sum(Mpv)
sumPos(M) = 236
sMp = 236
sumNeg(A) :=
    s ← 0
    for i ∈ 0 .. 9
        for j ∈ 0 .. 9
            s ← s + A[i, j] if (A[i, j] < 0)
    return s
Mn[i, j] := M[i, j]*(M[i, j] < 0)
w := (vectorize(A)×vectorize(B))*vectorize(C) = 1336.46
Mnv[i] := sum(Mn[:, i])
w := (A[1]*B[2] - A[2]*B[1])*C[0] + (A[2]*B[0] - A[0]*B[2])*C[1] + (A[0]*B[1] - A[1]*B[0])*C[2] = 1336.46
sMn := sum(Mnv)
sumNeg(M) = -249
p := if((|A| > |B|) and (|A| > |C|), "Это А", "Это не А")
sMn = -249
p := if((|B| > |A|) and (|B| > |C|), "'Это B", p)
X := submatrix(M, 0, 9, 0, 0)
p := if((|C| > |B|) and (|C| > |A|), "'Это С", p)
Y := submatrix(M, 9, 9, 0, 9)
p = "'Это B"
Y = [5, 9, 2, 1, 0, -2, 8, -5, 4, 2]
n := 10
m := 10
i := 0 .. n - 1
j := 0 .. m - 1
M[i, j] := floor(-10 + rnd(20))
X = [7; 4; 5; -5; -2; 7; 5; 3; 4; 5]
M = [
    3, -1, 6, -10, -3, 6, 7, 3, 4, 9;
    -3, 8, -1, 7, -10, 8, -7, -8, -8, 1;
    4, 3, 6, 9, -6, -3, 1, 9, -3, -8;
    -10, 5, -10, -2, -1, 4, 1, 8, 7, -1;
    4, -5, 5, 1, 0, 4, 4, 8, 5, -3;
    -9, -10, 5, -7, 3, -4, 5, 9, -5, 7;
    -8, -8, -4, 6, 6, 7, -5, -6, 7, 6;
    -10, -7, -2, 7, 0, 0, 9, 7, -8, -5;
    9, 4, 2, 4, -8, -3, 8, -10, -2, -6;
    -7, 0, 5, -6, 5, 1, 7, 0, 7, -6
]
q := vectorize(X)*vectorize(transpose(Y))
q = 113
Mv[i] := sum(M[:, i])
sum(sum(M[i, j], j = 0 .. 9), i = 0 .. 9) = 37
sM := sum(Mv)
sM = 37
sumPos(A) :=
    s ← 0
    for i ∈ 0 .. 9
        for j ∈ 0 .. 9
            s ← s + A[i, j] if (A[i, j] > 0)
    return s
Mp[i, j] := M[i, j]*(M[i, j] > 0)
Mpv[i] := sum(Mp[:, i])
sMp := sum(Mpv)
sumPos(M) = 286
sMp = 286
sumNeg(A) :=
    s ← 0
    for i ∈ 0 .. 9
        for j ∈ 0 .. 9
            s ← s + A[i, j] if (A[i, j] < 0)
    return s
Mn[i, j] := M[i, j]*(M[i, j] < 0)
Mnv[i] := sum(Mn[:, i])
sMn := sum(Mnv)
sumNeg(M) = -249
sMn = -249
X := submatrix(M, 0, 9, 0, 0)
Y := submatrix(M, 9, 9, 0, 9)
Y = [-7, 0, 5, -6, 5, 1, 7, 0, 7, -6]
X = [3; -3; 4; -10; 4; -9; -8; -10; 9; -7]
q := vectorize(X)*vectorize(transpose(Y))
q = 119
