x1 := -9
x2 := 9
dx := 0.25
x := x1, x1 + dx .. x2
f(x) := if(x < 0, e^x*x^3, e^(-x)*x^3)
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x = [
    -9; -8.75; -8.5; -8.25; -8; -7.75; -7.5; -7.25; -7; -6.75
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]
