x1 := -2*π
x2 := 2*π
dx := π/4
Nx := (x2 - x1)/dx
i := 1 .. Nx
x[i] := x1 + i*dx
g(x) := sqrt(|x|)*sin(x)
X := x
Y := g(x)
filename1 := "X.txt"
filename2 := "Y.txt"
WRITEPRN(filename1) := X
WRITEPRN(filename2) := Y
Y = [0; 2.69879; 3.81667; 2.69879; 0; -2.69879; -3.81667; -2.69879; 0; 2.69879; 3.81667; 2.69879; 0; -2.69879; -3.81667; -2.69879; 0]
X = [0; -5.49779; -4.71239; -3.92699; -3.14159; -2.35619; -1.5708; -0.785398; 0; 0.785398; 1.5708; 2.35619; 3.14159; 3.92699; 4.71239; 5.49779; 6.28319]
YY := READPRN(filename2)
XX := READPRN(filename1)
XX = [0; -5.498; -4.712; -3.927; -3.142; -2.356; -1.571; -0.7854; 0; 0.7854; 1.571; 2.356; 3.142; 3.927; 4.712; 5.498; 6.283]
YY = [0; 2.699; 3.817; 2.699; 0; -2.699; -3.817; -2.699; 0; 2.699; 3.817; 2.699; 0; -2.699; -3.817; -2.699; 0]
y[i] := g(x[i])
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