# Начальные значения
X_1 := 4
Y_1 := 2  # координаты точки A
X_2 := 4
Y_2 := 8  # координаты точки В
X_3 := 6
Y_3 := 7  # координаты точки С
X_4 := 6
Y_4 := 3  # координаты точки D
f_BC(x) := -0.5*x + 10  # - уравнение прямой с точками B и C
P := [X_1, X_2, X_3, X_4, X_1; Y_1, Y_2, Y_3, Y_4, Y_1; 1, 1, 1, 1, 1]
f_AD(x) := 0.5*x  # - уравнение прямой с точками A  и D
f(x) := f_BC(x) - f_AD(x)
X := transpose(P)[:, 0]
Y := transpose(P)[:, 1]
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x := 9
Px := root(f(x), x)  # Точка P пересечения
Py := f_BC(Px)
Px = 10
Py = 5
T_S(dx, dy) := [1, 0, -dx; 0, 1, -dy; 0, 0, 1]  # - смещение начала системы координат
T_O(dx, dy) := T_S(-dx, -dy)  # - смещение объекта
R_O(fi) := [cos(fi), -sin(fi), 0; sin(fi), cos(fi), 0; 0, 0, 1]  # - поворот объекта на угол fi
fi := -90
fi_rad := fi*π/180
# 1. Смещаем систему координат в точку P
P1 := T_S(Px, Py)*P
P1 = [-6, -6, -4, -4, -6; -3, 3, 2, -2, -3; 1, 1, 1, 1, 1]
X1 := transpose(P1)[:, 0]
Y1 := transpose(P1)[:, 1]
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X1 = [-6; -6; -4; -4; -6]
Y1 = [-3; 3; 2; -2; -3]
# 2. Поворачиваем объект на 90 град. по часовой стрелке
P2 := R_O(fi_rad)*P1
P2 = [-3, 3, 2, -2, -3; 6, 6, 4, 4, 6; 1, 1, 1, 1, 1]
X2 := transpose(P2)[:, 0]
Y2 := transpose(P2)[:, 1]
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X2 = [-3; 3; 2; -2; -3]
Y2 = [6; 6; 4; 4; 6]
# 3. Смещаем систему координат в исходное положение
P3 := T_S(-Px, -Py)*P2
P3 = [7, 13, 12, 8, 7; 11, 11, 9, 9, 11; 1, 1, 1, 1, 1]
X3 := transpose(P3)[:, 0]
Y3 := transpose(P3)[:, 1]
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